clock {
	timezone PST+8PDT;
	starttime '2005-01-01 0:00:00 PST';
}

module residential;
module tape;
object house:1{
	cooling_setpoint 75degF;
}
object house:2{
	cooling_setpoint 85degF;
}

object histogram{
	name histogram_test;
	filename hist_test.csv;
	//writes 24 times to output in uniform bins
	bins 40-50,50-60,60-70,70-80,80-90,90-100;
	count 24;
	samplerate 3600;
	countrate 3600;
	group class=house;
	property cooling_setpoint;


}
