clock {
	timezone PST+8PDT;
	starttime '2005-01-01 0:00:00 PST';
}

module residential;
module tape;
object house:1{
	cooling_setpoint 75degF;
	heating_setpoint 60degF;
}
object house:2{
	cooling_setpoint 85degF;
}

object histogram{
	name histogram_test;
	filename hist_test_2.csv;
	bin_count 10;
	min 0;
	max 100;
	count 24;
	countrate 3600;
	samplerate 2400;
	group class=house;
	property cooling_setpoint;


}
