module residential;
module tape;

clock {
	timezone PST+8PDT;
	timestamp '2001-01-01 0:00:00';
	stoptime '2001-02-01 0:00:00';
}

module residential;
module tape;

object house{
	heating_setpoint 40 degF;
	cooling_setpoint 90 degF;
	object player {
		property cooling_setpoint;
		file theat.csv;
		loop 28;
	};
}
