// Exercise 2.2.1

module residential;
module tape;

clock {
	timezone PST+8PDT;
	starttime '2001-01-01 00:00:00';
	stoptime '2002-01-01 00:00:00';
}

object house {
	object recorder {
		property air_temperature;
		file "exercise_2_2_1.csv";
		interval 3600;
		limit 8760;
	};
}
