module residential;
module tape;

clock {
	timezone PST+8PDT;
	starttime '2001-01-01 0:00:00 PST';
}

object house {
	cooling_setpoint 90 degF;
	object player {
		property heating_setpoint;
		file "theat.csv";
		loop 28;
	};
}
