// Exercise 5.4.2

#set debug=1
#set verbose=1

clock {
	timestamp '2000-01-01 0:00:00';
	timezone PST+8PDT;
}


module plc {
	incpath "c:/progra~1/gridlab-d/rt";
	libpath "c:/progra~1/gridlab-d/lib";
}

object comm {
	name net;
	latency pareto(1,3);
	reliability 0.99;
	bitrate 1.5 Mb/s;
	timeout 10 s;
}

object plc {
	name from;
	parent net;
	network net;
	source from.plc;
}

object plc {
	name to;
	parent net;
	network net;
	source to.plc;
}
