// Exercise 2.2.2

module tape;
module residential {
	implicit_enduses NONE;
}

clock {
	timezone PST+8PDT;
	starttime '2001-01-01 00:00:00';
	stoptime '2001-01-08 00:00:00';
}

object house {
	name house1;
	object waterheater {
		object multi_recorder {
			property actual_load,house1:hvac_load;
			file "exercise_2_2_2.csv";
			interval 300;
			limit 2016;
		};
	};
}
